<Lems>

    <!-- Specify which component to run -->
    <Target component="MitralSim"/>

    <!-- Include core NeuroML2 ComponentType definitions -->
    <Include file="Cells.xml"/>
    <Include file="Networks.xml"/>
    <Include file="Simulation.xml"/>

    <Include file="../MitralCells/Exported/Mitral_0_0.cell.nml"/>
    <Include file="../Channels/pas.channel.nml"/>
    <Include file="../Channels/nax__sh0.channel.nml"/>
    <Include file="../Channels/nax__sh10.channel.nml"/>
    <Include file="../Channels/kamt.channel.nml"/>
    <Include file="../Channels/kdrmt.channel.nml"/>

    <Include file="AmpaNmda.synapse.nml" />

    <pulseGenerator id="input_1" delay="20ms" duration="200ms" amplitude="5 nA"/>

    <ampaNmdaSynapse id="AmpaNmdaSyn2" Cdur="1 ms" Alpha="0.35 per_ms" Beta="0.035 per_ms" erev="0.0 mV" mg="1 mM"
        gbase="50 uS" gampafactor="0.01" nmdafactor="0.035" LTPlimit="33.33 ms" LTDlimit="250 ms" sigHalf="50"
        sigSlope="10" ampatau="3 ms"/>

    <network id="network" type="networkWithTemperature" temperature="35 degC">

        <population id="MitralPop1" type="populationList" component="Mitral_0_0" size="1">
            <instance id="0">
                <location y="0." x="0." z="0."/>
            </instance>
        </population>
        <population id="MitralPop2" type="populationList" component="Mitral_0_0" size="1">
            <instance id="0">
                <location y="0." x="0." z="0."/>
            </instance>
        </population>

        <projection id="Proj0" presynapticPopulation="MitralPop1" postsynapticPopulation="MitralPop2" synapse="AmpaNmdaSyn2">
            <connection id="0" preCellId="../MitralPop1/0/Mitral_0_0" postCellId="../MitralPop2/0/Mitral_0_0" preSegmentId="0" preFractionAlong="0.5" postSegmentId="43" postFractionAlong="0.5"/>
        </projection>

        <inputList id="input_1" component="input_1" population="MitralPop1">
            <input destination="synapses" id="0" target="../MitralPop1[0]"/>
        </inputList>
    </network>

    <Simulation id="MitralSim" length="180ms" step="0.01ms" target="network">

        <Display id="Mitral_1D" title="Mitral Cell (1 nA)" timeScale="1ms" xmin="-18.0" xmax="198.0" ymin="-90" ymax="50">
            <Line id="soma_v1nA"       quantity="MitralPop1/0/Mitral_0_0/0/v"  scale="1" color="#f3e4c5" timeScale="1ms"/>
            <Line id="initialseg_v1nA" quantity="MitralPop1/0/Mitral_0_0/1/v"  scale="1" color="#283ab0" timeScale="1ms"/>
            <Line id="priden_v1nA"     quantity="MitralPop1/0/Mitral_0_0/43/v" scale="1" color="#c6d577" timeScale="1ms"/>
        </Display>

        <OutputFile id="Mitral_1F" fileName="Mitral_1nA.dat">
            <OutputColumn id="soma_v1nA"       quantity="MitralPop1/0/Mitral_0_0/0/v"/>
            <OutputColumn id="initialseg_v1nA" quantity="MitralPop1/0/Mitral_0_0/1/v"/>
            <OutputColumn id="priden_v1nA"     quantity="MitralPop1/0/Mitral_0_0/43/v"/>
        </OutputFile>

        <Display id="Mitral_2D" title="Mitral Cell (2 nA)" timeScale="1ms" xmin="-18.0" xmax="198.0" ymin="-90" ymax="50">
            <Line id="soma_v2nA"       quantity="MitralPop2/0/Mitral_0_0/0/v"  scale="1" color="#f3e4c5" timeScale="1ms"/>
            <Line id="initialseg_v2nA" quantity="MitralPop2/0/Mitral_0_0/1/v"  scale="1" color="#283ab0" timeScale="1ms"/>
            <Line id="priden_v2nA"     quantity="MitralPop2/0/Mitral_0_0/43/v" scale="1" color="#c6d577" timeScale="1ms"/>
        </Display>

        <OutputFile id="Mitral_2F" fileName="Mitral_2nA.dat">
            <OutputColumn id="soma_v2nA"       quantity="MitralPop2/0/Mitral_0_0/0/v"/>
            <OutputColumn id="initialseg_v2nA" quantity="MitralPop2/0/Mitral_0_0/1/v"/>
            <OutputColumn id="priden_v2nA"     quantity="MitralPop2/0/Mitral_0_0/43/v"/>
        </OutputFile>

    </Simulation>

</Lems>
